N := 2.545*10^25
λr := 650*10^-9
n := 1.0003
pn := 0.035
λg := 535*10^-9
λb := 450*10^-9
K := 8*π^3*(n^2 - 1)^2/(3*N)
K = 1.16994e-30
c(T) := (0.6544*T - 0.6510)*10^-16
βr(λ) := K/λ^4
βm(λ, T) := 0.434*0.5*c(T)*4*π^2/λ^2
t := 1
βr(λr) = 6.55405e-6
βm(λr, t) = 6.89401e-6
βr(λg) = 1.42807e-5
βm(λg, t) = 1.01763e-5
βr(λb) = 2.85308e-5
βm(λb, t) = 1.43838e-5
